// COMSOL Multiphysics 6.4.0.378 model "horn-teaching.mph"
// Outline of the model tree

Parameters
  f0 = 10[GHz]  // Operating frequency
  a = 22.86[mm]  // WR90 inner width, x
  b = 10.16[mm]  // WR90 inner height, y
  Lwg = 25[mm]  // Straight guide length
  Lh = 60[mm]  // Flare length
  A = 45[mm]  // Aperture inner width, x
  B = 30[mm]  // Aperture inner height, y
  t = 1[mm]  // Ideal PEC wall and rear-cap thickness
  Rair = 60[mm]  // Outer air sphere radius
  hmax = 8[mm]  // Maximum tetrahedron size
  zc = (Lwg+Lh)/2  // Half total antenna length
  lambda0 = c_const/f0  // Free-space wavelength
  fc10 = c_const/(2*a)  // TE10 cutoff frequency
  lambda_g = lambda0/sqrt(1-(fc10/f0)^2)  // TE10 guided wavelength
  ao = a+2*t  // Outer guide width
  bo = b+2*t  // Outer guide height
  Ao = A+2*t  // Outer aperture width
  Bo = B+2*t  // Outer aperture height

Selections
  feed: Box "Feed cross-section at z=-zc"
    entitydim = 2
    xmin = -a/2-0.01[mm]
    xmax = a/2+0.01[mm]
    ymin = -b/2-0.01[mm]
    ymax = b/2+0.01[mm]
    zmin = -zc-0.01[mm]
    zmax = -zc+0.01[mm]
    condition = inside

Couplings
  intout: Integration on selection geom1_airball_bnd

Probes
  emw_port1_probe: GlobalVariable "Port Probe" | expr = emw.S11dB; unit = dB; descr = S11

Geometry
  geom1 "Geometry 1" (3D, length unit mm)
    wgout: Block "Outer guide and rear cap" | size = {ao, bo, Lwg+t}; pos = {-ao/2, -bo/2, -zc-t}
    hout: Hexahedron "Outer flare"
      p = 
        {-ao/2, -ao/2, ao/2, ao/2, -Ao/2, -Ao/2, Ao/2, Ao/2}
        {-bo/2, bo/2, bo/2, -bo/2, -Bo/2, Bo/2, Bo/2, -Bo/2}
        {Lwg-zc, Lwg-zc, Lwg-zc, Lwg-zc, Lwg+Lh-zc, Lwg+Lh-zc, Lwg+Lh-zc, Lwg+Lh-zc}
    outuni: Union | input = wgout, hout; intbnd = off; face = all
    wgin: Block "Inner guide air" | size = {a, b, Lwg}; pos = {-a/2, -b/2, -zc}
    hin: Hexahedron "Inner flare air"
      p = 
        {-a/2, -a/2, a/2, a/2, -A/2, -A/2, A/2, A/2}
        {-b/2, b/2, b/2, -b/2, -B/2, B/2, B/2, -B/2}
        {Lwg-zc, Lwg-zc, Lwg-zc, Lwg-zc, Lwg+Lh-zc, Lwg+Lh-zc, Lwg+Lh-zc, Lwg+Lh-zc}
    inuni: Union | input = wgin, hin; intbnd = off; face = all
    metal: Difference "Metal shell: outer minus inner" | input = outuni; input2 = inuni
    airball: Sphere "Free-space air sphere" | r = Rair
    air: Difference "Solved air: sphere minus metal" | input = airball; input2 = metal
    fin: Finalize "Form Union"

Materials
  airmat: Common "Air, lossless" on all domains
    def: def "Basic"
      relpermittivity = 1
      relpermeability = 1
      electricconductivity = 0

Physics
  emw: ElectromagneticWaves "Electromagnetic Waves, Frequency Domain" on all domains
    dependent variable E = {Ex, Ey, Ez}
    wee1: WaveEquationElectric (default)
    pec1: PerfectElectricConductor (default)
    init1: init "Initial Values 1" (default)
    port1: Port "Port 1: rectangular TE10, excitation on" on selection feed
      PortName = 1
      PortExcitation = on
      PortType = Rectangular
      PortModeType = TE
    sbc1: Scattering "Outer sphere: second-order scattering" on selection geom1_airball_bnd
      IncidentField = NoIncidentField
      Order = SecondOrder
    ffd1: FarFieldDomain on all domains
      ffc1: FarFieldCalculation on selection geom1_airball_bnd

Mesh
  mesh1 "Mesh 1"
    size: MeshSizeDefault | hmax = hmax; hmin = 0.5[mm]; hgrad = 1.4; custom = on
    ftet1: FreeTet "Free Tetrahedral 1" on remaining entities

Studies
  std1 "Study 1"
    freq: Frequency "Frequency Domain" | punit = GHz; plist = f0

Solver configurations
  sol1 "Solution 1" (study std1)
    v1: Variables "Dependent Variables 1"
    s1: Stationary "Stationary Solver 1"
      p1: Parametric | pname = freq; plistarr = f0; punit = Hz
      d1: Direct | linsolver = pardiso
      fc1: FullyCoupled | linsolver = d1

Datasets
  dset1: Solution | solution = sol1
  cpHorn: CutPlane | data = dset1; quickplane = xz

Derived values
  postMetrics: EvalGlobal "Global Evaluation"
    data = dset1
    table = postTable
    expr = {emw.S11dB, abs(emw.S11)^2, intout(emw.Poavx*nx+emw.Poavy*ny+emw.Poavz*nz), emw.maxDdB, lambda0, lambda_g, fc10}
  patternValues: EvalGlobal "Global Evaluation 2"
    data = dset1
    table = patternTable
    expr = {abs(Efarx(sin(-180[deg]),0,cos(-180[deg])))^2+abs(Efary(sin(-180[deg]),0,cos(-180[deg])))^2+abs(Efarz(sin(-180[deg]),0,cos(-180[deg])))^2, abs(Efarx(sin(-178[deg]),0,cos(-178[deg])))^2+abs(Efary(sin(-178[deg]),0,cos(-178[deg])))^2+abs(Efarz(sin(-178[deg]),0,cos(-178[deg])))^2, abs(Efarx(sin(-176[deg]),0,cos(-176[deg])))^2+abs(Efary(sin(-176[deg]),0,cos(-176[deg])))^2+abs(Efarz(sin(-176[deg]),0,cos(-176[deg])))^2, abs(Efarx(sin(-174[deg]),0,cos(-174[deg])))^2+abs(Efary(sin(-174[deg]),0,cos(-174[deg])))^2+abs(Efarz(sin(-174[deg]),0,cos(-174[deg])))^2, abs(Efarx(sin(-172[deg]),0,cos(-172[deg])))^2+abs(Efary(sin(-172[deg]),0,cos(-172[deg])))^2+abs(Efarz(sin(-172[deg]),0,cos(-172[deg])))^2, abs(Efarx(sin(-170[deg]),0,cos(-170[deg])))^2+abs(Efary(sin(-170[deg]),0,cos(-170[deg])))^2+abs(Efarz(sin(-170[deg]),0,cos(-170[deg])))^2, abs(Efarx(sin(-168[deg]),0,cos(-168[deg])))^2+abs(Efary(sin(-168[deg]),0,cos(-168[deg])))^2+abs(Efarz(sin(-168[deg]),0,cos(-168[deg])))^2, abs(Efarx(sin(-166[deg]),0,cos(-166[deg])))^2+abs(Efary(sin(-166[deg]),0,cos(-166[deg])))^2+abs(Efarz(sin(-166[deg]),0,cos(-166[deg])))^2, abs(Efarx(sin(-164[deg]),0,cos(-164[deg])))^2+abs(Efary(sin(-164[deg]),0,cos(-164[deg])))^2+abs(Efarz(sin(-164[deg]),0,cos(-164[deg])))^2, abs(Efarx(sin(-162[deg]),0,cos(-162[deg])))^2+abs(Efary(sin(-162[deg]),0,cos(-162[deg])))^2+abs(Efarz(sin(-162[deg]),0,cos(-162[deg])))^2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}

Plots
  pgHornField: PlotGroup2D "Electric-field magnitude, y=0" | data = cpHorn; title = Pyramidal horn: |E|, 10 GHz, 1 W, y=0
    surf1: Surface | expr = emw.normE; unit = V/m
  pgH: PlotGroup1D "H-plane (xz): normalized far field"
    data = dset1
    xlabel = Angle from +z (degrees)
    ylabel = Normalized field level (dB)
    rad1: RadiationPattern
      expr = 20*log10(emw.normEfar/sqrt(abs(Efarx(0,0,1))^2+abs(Efary(0,0,1))^2+abs(Efarz(0,0,1))^2))
      phidisc = 181
      normal = {0, 1, 0}
      refdir = {0, 0, 1}
  pgE: PlotGroup1D "E-plane (yz): normalized far field"
    data = dset1
    xlabel = Angle from +z (degrees)
    ylabel = Normalized field level (dB)
    rad1: RadiationPattern
      expr = 20*log10(emw.normEfar/sqrt(abs(Efarx(0,0,1))^2+abs(Efary(0,0,1))^2+abs(Efarz(0,0,1))^2))
      phidisc = 181
      normal = {-1, 0, 0}
      refdir = {0, 0, 1}

Exports
  imgpgHornField: Image
    size = manualweb
    unit = px
    width = 1700
    height = 1100
    pngfilename = ../images/horn-field.png
    addsuffix = off
  fieldData: Data | data = cpHorn; expr = emw.normE; filename = ../validation/baseline-field.txt