// COMSOL Multiphysics 6.4.0.378 model "blade.mph"
// Outline of the model tree

Parameters
  f0 = 10[GHz]  // Frequency
  lambda0 = c_const/f0  // Free-space wavelength
  L = 60[mm]  // Target length along x
  W = 24[mm]  // Target width at x = -L/2
  t = 1.5[mm]  // Target thickness
  Rair = 49[mm]  // Radius of spherical air domain
  hAir = lambda0/5  // Maximum element size in air
  hPEC = lambda0/8  // Maximum element size on the PEC
  alpha = 0[deg]  // Angle from target normal (look plane x-z)
  E0 = 1[V/m]  // Incident electric-field amplitude

Selections
  pecFaces: Box "Target boundary (inside box)"
    entitydim = 2
    xmin = -L/2-1[mm]
    xmax = L/2+1[mm]
    ymin = -W/2-1[mm]
    ymax = W/2+1[mm]
    zmin = -t/2-1[mm]
    zmax = t/2+1[mm]
    condition = inside
  outerFaces: Complement "Outer boundary" | entitydim = 2; input = {pecFaces}

Geometry
  geom1 "Geometry 1" (3D, length unit mm)
    sph1: Sphere | r = Rair
    wp1: WorkPlane | quickz = -t/2
      pol1: Polygon | x = {-L/2, L/2, L/2, -L/2}; y = {-W/2, -W/4, W/4, W/2}
    ext1: Extrude | workplane = wp1; input = wp1; distance = t
    dif1: Difference | input = sph1; input2 = ext1
    fin: Finalize "Form Union"

Materials
  air: Common "Air (lossless)" on all domains
    def: def "Basic"
      relpermittivity = 1
      relpermeability = 1
      electricconductivity = 0

Physics
  emw: ElectromagneticWaves "Electromagnetic Waves, Frequency Domain" on all domains
    dependent variable E = {Ex, Ey, Ez}
    BackgroundField.SolveFor = scatteredField
    BackgroundField.Eb = {0, E0*exp(-j*emw.k0*(x*sin(alpha)-z*cos(alpha))), 0}
    wee1: WaveEquationElectric (default)
    pec1: PerfectElectricConductor (default)
    init1: init "Initial Values 1" (default)
    pecT: PerfectElectricConductor on selection pecFaces
    sbc1: Scattering "Outer air boundary (second order)" on selection outerFaces
      IncidentField = NoIncidentField
      Order = SecondOrder
    ffd1: FarFieldDomain on all domains
      ffc1: FarFieldCalculation on selection outerFaces

Mesh
  mesh1 "Mesh 1"
    size: MeshSizeDefault | hmax = hAir; hmin = 0.5[mm]; hgrad = 1.4; custom = on
    sizT: Size on selection pecFaces | hmax = hPEC; custom = on
    ftet1: FreeTet "Free Tetrahedral 1" on remaining entities

Studies
  std1 "Study 1"
    freq: Frequency "Frequency Domain" | punit = GHz; plist = f0

Solver configurations
  sol1 "Solution 1" (study std1)
    v1: Variables "Dependent Variables 1"
    s1: Stationary "Stationary Solver 1"
      p1: Parametric
      fc1: FullyCoupled
      i1: Iterative "Suggested Iterative Solver (emw)"
        mg1: Multigrid

Datasets
  dset1: Solution | solution = sol1
  cutXZ: CutPlane "XZ plane, y = 0" | data = dset1; quickplane = xz; quicky = 0[mm]

Derived values
  rcs: EvalGlobal "Monostatic RCS"
    data = dset1
    expr = {4*pi*(abs(Efarx(-sin(alpha),0,cos(alpha)))^2+abs(Efary(-sin(alpha),0,cos(alpha)))^2+abs(Efarz(-sin(alpha),0,cos(alpha)))^2)/E0^2, 10*log10((4*pi*(abs(Efarx(-sin(alpha),0,cos(alpha)))^2+abs(Efary(-sin(alpha),0,cos(alpha)))^2+abs(Efarz(-sin(alpha),0,cos(alpha)))^2)/E0^2)/1[m^2])}
    descr = {Monostatic RCS (square metres), Monostatic RCS (dBsm)}

Plots
  pgF: PlotGroup2D "Scattered electric field in XZ plane" | data = cutXZ
    surf1: Surface | expr = abs(emw.relEy)
  pgM: PlotGroup3D "Volume mesh and PEC target" | data = dset1
    mesh1: Mesh